FINISH
/CLEAR

L = 100
A = 4
F = 1000
E = 2e5
MU = 0.3

/PREP7 ! Подключение библиотеки
ET,1,LINK180

MP,EX,1,E ! Выбор материала
MP,PRXY,1,MU ! Коэффициент Пуассона

SECTYPE,1,LINK ! Создание поперечного сечения для типа LINK
SECDATA,A ! Площадь

SECTYPE,2,LINK
SECDATA,2*A

N,1,0,0,0 ! Создание узла
N,2,L,0,0
N,3,2*L,0,0
N,4,3*L,0,0

TYPE,1 ! Все следующие элементы типа 1
MAT,1 !
SECNUM,2 !
E,1,2 ! Построение элемента между узлами 1 и 2
SECNUM,1
E,2,3
E,3,4

/ESHAPE,1 ! Для объемного отображения элментов
GPLOT ! Обновление экрана

/SOL
D,1,UX,0 ! Закрепление узла по X
D,4,UX,0

! По X и по Y  перемещения для всех узлов 0(делаем задачу одномерной)
D,ALL,UY,0
D,ALL,UZ,0

F,3,FX,F ! Добавление силы

SOLVE ! Запуск расчета

/POST1 ! Ввод результатов

!PLDISP,1 ! Просмотр перемещений

!PRRSOL ! Вывод реакций

PLESOL,S,X ! Раскрашивание элементов и вывод напряжений
