FINISH
/CLEAR


L = 200
B = 10
H = 2
q = 0.1
E = 2e5
MU = 0.3


/PREP7
ET,1,BEAM188,,,3	! 3 - для кубического перемещения (без 3 будет линейная)


! Материал
MP,EX,1,E
MP,PRXY,1,MU


! Поперечное сечение(типа прямоугольного)

! Для первого
SECTYPE,1,BEAM,RECT
SECDATA,B,H
! Для второго
SECTYPE,2,BEAM,RECT
SECDATA,2*B,H


! Вывод информации о сечениях
!secplot,1,1
!secplot,2,1


! Моделирование конструкции

! Создание узлов
N,1,0,0,0
N,2,L,0,0
N,3,2*L,0,0
N,4,4*L,0,0


! Орентационный узел
N,5,0,L/4,0


! Построение конечных элементов

SECNUM,2
E,1,2,5

SECNUM,1
E,2,3,5

SECNUM,1
E,3,4,5

/eshope,1
/VIEW,1,1,1,1 ! Показ изометрии
/PNUM,NODE,1 ! Добавление номерации узлов
GPLOT


/SOL

! Заделки
D,1,ALL,0
D,4,ALL,0

! Шарнир(вертикальный)
D,2,UY,0

! Плавующая заделка
D,3,ROTZ,0


! Силы и моменты
F,3,FY,q*L/2 ! добавить "-" к значениб силы если сила направлена вниз
F,2,MZ,q*L*L/12

! Распределенная нагрузка
SFBEAM,1,1,PRES,q

! Принудительное отображение сил и опор
/PBC,ALL,,1
! Принудительное отображение давление
/PSF,PRES,NORM,2,0,1
GPLOT

! Сделать скриншот!!!(в дз)

DSYM,SYMM,Z

! РАСЧЕТ
SOLVE
! Для последних версий ANSYS и WINDOWS добавить OUTRES,ALL,ALL

! Просмотр результатов
/POST1
! Для последних версий ANSYS и WINDOWS добавить SET,LAST


!PLDISP,1
! Делаем  PLDISP,1 и делаем скриншот

!PLESOL,S,EQV
! Делаем  PPLESOL,S,EQV и делаем скриншот

/VIEW,1,0,0,1 ! Просмотр конструкции в плоскости  XY
ETABLE,MI,SMISC,2
ETABLE,MJ,SMISC,15
PLLS,MI,MJ

! делаем последний скриншот
